OpenVSP model (file version 4), 6 components.
Geometry view with OpenVSP parameter names; values to 6 digits, angles in degrees, lengths in the model's unit.
Overall bounding box: X_Min=-14 X_Len=37.8605 Y_Min=-16.9778 Y_Len=33.9556 Z_Min=-2.88005 Z_Len=10.9795

Wing "Wing_A320_neo"
  location (X Y Z) 0 0 0, rotation 0 0 0
  symmetric about XZ
  bounding box size 8.24243 33.9556 1.79562
  totals: TotalSpan=34.07 TotalProjectedSpan=33.9556 TotalChord=4.42047 TotalArea=121.436
  root: chord 5.80233, twist 0, airfoil file "F15 15 AIRFOIL"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 ThickChord=0.1
  sections:
    n  Span    Root_Chord  Tip_Chord  Area     Sweep  Sweep_Location  Dihedral  Twist  Twist_Location  tip airfoil
    1  2       5.80233     5.80233    11.6047  0      0               0         0      0.25            as above
    2  4.37    5.80233     3.86822    21.1301  20.74  0.174194        5         0.5    0.25            airfoil file "F_15_12 AIRFOIL"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 ThickChord=0.1
    3  10.665  3.86822     1.37943    27.9831  24.54  0               5         0.3    0.25            airfoil file "F_15_11 AIRFOIL"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 ThickChord=0.1

Wing "Horizontal tailplane"
  location (X Y Z) 17.5623 0 0, rotation 0 0 0
  symmetric about XZ
  bounding box size 5.27756 12.46 0.387966
  totals: TotalSpan=12.46 TotalProjectedSpan=12.46 TotalChord=2.55806 TotalArea=31.8735
  root: chord 3.87585, twist 0, NACA 4-series Camber=0 CamberLoc=0.2 ThickChord=0.1
  sections:
    n  Span  Root_Chord  Tip_Chord  Area     Sweep  Sweep_Location  Dihedral  Twist  Twist_Location  tip airfoil
    1  6.23  3.87585     1.24027    15.9367  28.47  0.25            0         0      0.25            as above

Wing "Vertical_tailplane", child of "Horizontal tailplane"
  location (X Y Z) 14.5953 0 1.59664, rotation 90 0 0
  bounding box size 7.8967 0.686673 6.50285
  totals: TotalSpan=6.50285 TotalProjectedSpan=6.50285 TotalChord=4.15707 TotalArea=23.2033
  root: chord 6.86, twist 0, NACA 4-series Camber=0 CamberLoc=0.2 ThickChord=0.1
  sections:
    n  Span     Root_Chord  Tip_Chord  Area     Sweep  Sweep_Location  Dihedral  Twist  Twist_Location  tip airfoil
    1  1.86207  6.86        4.21047    10.307   35.39  0.602837        0         0      0.25            as above
    2  4.64078  4.21047     1.34735    12.8963  35.39  0.116129        0         0      0.25            as above

Duct "Engine"
  location (X Y Z) -0.5 -5.73 -1.4, rotation 0 0 0
  bounding box size 4.1 2.92033 2.96009
  Design: Camber=0 CamberLoc=0.2 Chord=4.1 Height=2.1 InvertFlag=0 Shape=0 ThickChord=0.2 Width=2.1
  custom script Duct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

Duct "Engine_2", child of "Engine"
  location (X Y Z) -0.5 5.73 -1.4, rotation 0 0 0
  bounding box size 4.1 2.92033 2.96009
  Design: Camber=0 CamberLoc=0.2 Chord=4.1 Height=2.1 InvertFlag=0 Shape=0 ThickChord=0.2 Width=2.1
  custom script Duct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

Fuselage "FuselageGeom"
  location (X Y Z) -14 0 0, rotation 0 0 0
  bounding box size 37.8605 4.08347 4.15642
  Design: Length=37.49
  cross sections:
    n  XLocPercent  YLocPercent  ZLocPercent  shape
    0  0            0            -0.02        circle Circle_Diameter=0.5
    1  0.03         0            -0.016       ellipse Ellipse_Height=1.8 Ellipse_Width=2
    2  0.18         0            0            ellipse Ellipse_Height=4.14 Ellipse_Width=4
    3  0.5          0            0            as above
    4  0.75         0            0            as above
    5  1            0            0.0326087    circle Circle_Diameter=0.5
