OpenVSP model (file version 4), 1 components.
Geometry view with OpenVSP parameter names; values to 6 digits, angles in degrees, lengths in the model's unit.
Overall bounding box: X_Min=-0.00208399 X_Len=8.30097 Y_Min=-16.9778 Y_Len=33.9556 Z_Min=-0.41754 Z_Len=1.81216

Wing "Wing_A320_neo"
  location (X Y Z) 0 0 0, rotation 0 0 0
  symmetric about XZ
  bounding box size 8.30097 33.9556 1.81216
  totals: TotalSpan=34.07 TotalProjectedSpan=33.9556 TotalChord=4.57107 TotalArea=125.573
  root: chord 6, twist 0, airfoil file "F15 15 AIRFOIL"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 ThickChord=0.1
  sections:
    n  Span    Root_Chord  Tip_Chord  Area     Sweep  Sweep_Location  Dihedral  Twist  Twist_Location  tip airfoil
    1  2       6           6          12       0      0               0         0      0.25            as above
    2  4.37    6           4          21.85    20.74  0.174194        5         0.5    0.25            airfoil file "F_15_12 AIRFOIL"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 ThickChord=0.1
    3  10.665  4           1.42643    28.9364  24.54  0               5         0.3    0.25            airfoil file "F_15_11 AIRFOIL"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 ThickChord=0.1
