OpenVSP model (file version 4), 7 components.
Geometry view with OpenVSP parameter names; values to 6 digits, angles in degrees, lengths in the model's unit.
Overall bounding box: X_Min=0 X_Len=46.4761 Y_Min=-20.2924 Y_Len=40.5849 Z_Min=-2.29735 Z_Len=13.6557

Fuselage "Body"
  location (X Y Z) 0 0 0, rotation 0 0 0
  bounding box size 41.8336 5.62326 7.2093
  Design: Length=41.8336
  cross sections:
    n   XLocPercent  YLocPercent  ZLocPercent  shape
    0   0            0            0            point
    1   0.044537     0            0            ellipse Ellipse_Height=2.12223 Ellipse_Width=2.14244
    2   0.0955509    0            0.00277778   ellipse Ellipse_Height=2.96512 Ellipse_Width=3.56744
    3   0.147383     0            0.00486111   ellipse Ellipse_Height=3.66279 Ellipse_Width=4.77674
    4   0.206005     0            0.0215278    ellipse Ellipse_Height=5.46512 Ellipse_Width=5.3814
    5   0.242986     0            0.0326389    ellipse Ellipse_Height=6.11412 Ellipse_Width=5.3814
    6   0.279967     0            0.0402778    ellipse Ellipse_Height=6.39535 Ellipse_Width=5.56279
    7   0.357292     0            0.0416667    ellipse Ellipse_Height=6.33721 Ellipse_Width=5.56279
    8   0.381076     0            0.0416667    as above
    9   0.404861     0            0.0368056    ellipse Ellipse_Height=6.65873 Ellipse_Width=5.62326
    10  0.452431     0            0.0326389    ellipse Ellipse_Height=7.05165 Ellipse_Width=5.62326
    11  0.5          0            0.0319444    ellipse Ellipse_Height=7.10654 Ellipse_Width=5.62326
    12  0.5625       0            0.03125      ellipse Ellipse_Height=7.2093 Ellipse_Width=5.62326
    13  0.625        0            0.03125      as above
    14  0.6875       0            0.0340278    ellipse Ellipse_Height=6.80233 Ellipse_Width=5.0186
    15  0.75         0            0.0430556    ellipse Ellipse_Height=5.98837 Ellipse_Width=4.07468
    16  0.797917     0            0.0493056    ellipse Ellipse_Height=5.1828 Ellipse_Width=2.86501
    17  0.845833     0            0.0576389    ellipse Ellipse_Height=4.06977 Ellipse_Width=1.45116
    18  0.884375     0            0.0625       ellipse Ellipse_Height=3.43023 Ellipse_Width=0.85218
    19  0.922917     0            0.0666667    ellipse Ellipse_Height=2.67442 Ellipse_Width=0.706654
    20  0.961458     0            0.0729167    ellipse Ellipse_Height=1.94538 Ellipse_Width=0.706654
    21  0.980729     0            0.0770833    ellipse Ellipse_Height=1.47377 Ellipse_Width=0.706654
    22  1            0            0.0895833    ellipse Ellipse_Height=0.139535 Ellipse_Width=0

Wing "Wings", child of "Body"
  location (X Y Z) 19.8387 0 -1.30563, rotation 0 0 0
  symmetric about XZ
  bounding box size 7.32886 38.5 1.05594
  totals: TotalSpan=38.5 TotalProjectedSpan=38.5 TotalChord=4.96511 TotalArea=191.157
  root: chord 7.32886, twist 0, NACA 4-series Camber=0 CamberLoc=0.2 ThickChord=0.124111
  sections:
    n  Span   Root_Chord  Tip_Chord  Area     Sweep    Sweep_Location  Dihedral  Twist  Twist_Location  tip airfoil
    1  19.25  7.32886     2.60135    95.5783  9.13613  0               0         0      0.25            NACA 4-series Camber=0 CamberLoc=0.2 ThickChord=0.1

Wing "Horizontal Stabilizer", child of "Wings"
  location (X Y Z) 41.1514 0 8.85385, rotation 0 0 0
  symmetric about XZ
  bounding box size 5.29668 14.6783 0.732491
  totals: TotalSpan=14.6783 TotalProjectedSpan=14.6783 TotalChord=3.28078 TotalArea=48.1564
  root: chord 4.58284, twist 0, NACA 4-series Camber=0 CamberLoc=0.2 ThickChord=0.137681
  sections:
    n  Span     Root_Chord  Tip_Chord  Area     Sweep    Sweep_Location  Dihedral  Twist  Twist_Location  tip airfoil
    1  7.33917  4.58284     1.97872    24.0782  24.3272  0               0         0      0.25            NACA 4-series Camber=0 CamberLoc=0.2 ThickChord=0.1

Wing "Vertical Stabilizer", child of "Wings"
  location (X Y Z) 25.8069 0.107527 4.56966, rotation 90 0 -2.25806
  bounding box size 20.6692 0.956739 7.39319
  totals: TotalSpan=7.39562 TotalProjectedSpan=7.39562 TotalChord=9.2401 TotalArea=61.3437
  root: chord 15.3425, twist 0, NACA 4-series Camber=0 CamberLoc=0.2 ThickChord=0.00517984
  sections:
    n  Span     Root_Chord  Tip_Chord  Area     Sweep    Sweep_Location  Dihedral  Twist  Twist_Location  tip airfoil
    1  2.32772  15.3425     8.24138    27.4484  75.2725  0               0         0      0.25            NACA 4-series Camber=0 CamberLoc=0.2 ThickChord=0.1
    2  5.0679   8.24138     5.13509    33.8953  49.3634  0.160305        0         0      0.25            as above

Wing "Winglets", child of "Vertical Stabilizer"
  location (X Y Z) 22.7259 19.1734 -1.24446, rotation 72.6582 0 0
  symmetric about XZ
  bounding box size 3.25877 40.5849 3.5451
  totals: TotalSpan=7.27311 TotalProjectedSpan=7.27311 TotalChord=1.73004 TotalArea=12.5827
  root: chord 2.82746, twist 0, NACA 4-series Camber=0 CamberLoc=0.2 ThickChord=0.128591
  sections:
    n  Span     Root_Chord  Tip_Chord  Area     Sweep    Sweep_Location  Dihedral  Twist  Twist_Location  tip airfoil
    1  3.63655  2.82746     0.632616   6.29137  35.8351  0               0         0      0.25            NACA 4-series Camber=0 CamberLoc=0.2 ThickChord=0.1

Fuselage "Engines", child of "Body"
  location (X Y Z) 21.1847 4.96824 1.80079, rotation 0 0 0
  symmetric about XZ
  bounding box size 8.11541 12.4804 2.81915
  Design: Length=8.11541
  cross sections:
    n  XLocPercent  YLocPercent  ZLocPercent  shape
    0  0            0            0            ellipse Ellipse_Height=1.80328 Ellipse_Width=1.43564
    1  0.26629      0            0            ellipse Ellipse_Height=2.81915 Ellipse_Width=2.31111
    2  0.424556     0            0            ellipse Ellipse_Height=2.81915 Ellipse_Width=2.45556
    3  0.519433     0            0            ellipse Ellipse_Height=2.81915 Ellipse_Width=2.54394
    4  0.625        0            0            ellipse Ellipse_Height=2.81915 Ellipse_Width=2.44778
    5  0.75         0            0            ellipse Ellipse_Height=2.81915 Ellipse_Width=2.31111
    6  1            0            0            ellipse Ellipse_Height=1.61702 Ellipse_Width=1.53465

Wing "Engine Supports", child of "Body"
  location (X Y Z) 24.5501 4.72821 -1.24446, rotation 83.5868 0 0
  symmetric about XZ
  bounding box size 4.99499 10.7219 1.81394
  totals: TotalSpan=3.45856 TotalProjectedSpan=3.45856 TotalChord=3.9575 TotalArea=13.6873
  root: chord 4.15814, twist 0, NACA 4-series Camber=0 CamberLoc=0.2 ThickChord=0.263813
  sections:
    n  Span     Root_Chord  Tip_Chord  Area     Sweep    Sweep_Location  Dihedral  Twist  Twist_Location  tip airfoil
    1  1.72928  4.15814     3.75686    6.84364  35.6019  0               0         0      0.25            NACA 4-series Camber=0 CamberLoc=0.2 ThickChord=0.1
