OpenVSP model (file version 4), 5 components.
Geometry view with OpenVSP parameter names; values to 6 digits, angles in degrees, lengths in the model's unit.
Overall bounding box: X_Min=-1.37538 X_Len=3.6819 Y_Min=-1.07963 Y_Len=2.15925 Z_Min=-1.09433 Z_Len=3.10709

Duct "Turbofan"
  location (X Y Z) 0 0 0, rotation 0 0 0
  bounding box size 2.75075 2.15925 2.18867
  Design: Camber=0 CamberLoc=0.2 Chord=2.75075 Height=1.8 InvertFlag=0 Shape=0 ThickChord=0.1125 Width=1.8
  custom script Duct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

Wing "Turbofan_pylon", child of "Turbofan"
  location (X Y Z) -0.952381 0 0.85, rotation 90 0 0
  bounding box size 2.76276 0.371487 1.16276
  totals: TotalSpan=1.16276 TotalProjectedSpan=1.16276 TotalChord=1.6 TotalArea=1.86041
  root: chord 1.6, twist 0, NACA 4-series Camber=0 CamberLoc=0.2 ThickChord=0.2
  sections:
    n  Span     Root_Chord  Tip_Chord  Area     Sweep  Sweep_Location  Dihedral  Twist  Twist_Location  tip airfoil
    1  1.16276  1.6         1.6        1.86041  45     0               0         0      0.25            as above

Fuselage "Spinners"
  location (X Y Z) -0.869565 0 0, rotation 0 0 0
  bounding box size 0.3 0.35 0.35
  Design: Length=0.3
  cross sections:
    n  XLocPercent  YLocPercent  ZLocPercent  shape
    0  0            0            0            point
    1  0.51087      0            0            circle Circle_Diameter=0.35
    2  1            0            0            as above
    3  1            0            0            point

Wing "Fan_blade"
  location (X Y Z) -0.69 0 0.1, rotation 90 -20 0
  15 copies around X
  bounding box size 0.152018 1.47942 1.47885
  totals: TotalSpan=1.24 TotalProjectedSpan=1.24 TotalChord=0.2 TotalArea=0.248
  root: chord 0.1, twist 0, NACA 4-series Camber=0 CamberLoc=0.2 ThickChord=0.1
  sections:
    n  Span  Root_Chord  Tip_Chord  Area   Sweep     Sweep_Location  Dihedral  Twist  Twist_Location  tip airfoil
    1  0.62  0.1         0.3        0.124  -8.16667  0               0         -40    0.25            NACA 4-series Camber=0 CamberLoc=0.2 ThickChord=0.0416667

Fuselage "FuselageGeom"
  location (X Y Z) -0.543478 0 0, rotation 0 0 0
  bounding box size 2.85 1.2 1.2
  Design: Length=2.85
  cross sections:
    n  XLocPercent  YLocPercent  ZLocPercent  shape
    0  0            0            0            circle Circle_Diameter=1
    1  0.538043     0            0            circle Circle_Diameter=1.2
    2  1            0            0            point
